P_local := 11.9 psi
V_20psi := [0.016981; 0.016599; 0.016482; 0.015435; 0.014833; 0.014617] V
P_20psi := [2.54715; 2.48985; 2.4723; 2.31525; 2.22495; 2.19255] psi
f_20psi := [60.8084; 105.731; 147.907; 250.113; 288.113; 322.461] Hz
Q_norm := [60; 65; 70; 80; 85; 90]*L/min
Q_STP20psi := vectorize(Q_norm*sqrt(P_20psi/P_local)) = [27.7591; 29.7322; 31.9062; 35.2871; 36.7541; 38.6317] L/min
Q_FlowMeter20psi := vectorize(Q_STP20psi*P_local/P_20psi) = [129.687; 142.102; 153.575; 181.37; 196.577; 209.672] L/min
