Q := 1500 cfm
A_top := 12 in*12 in = 144 in^2
A_bot := π/4*(12 in)^2 = 113.097 in^2
A_port1 := 64 in^2
A_testSection1 := 36 in^2
A_port2 := π/4*(6.75 in)^2 = 35.7847 in^2
A_testSection2 := π/4*(8 in)^2 = 50.2655 in^2
V_top := Q/A_top = 17.0455 mph
V_bot := Q/A_bot = 21.7029 mph
V_port1 := Q/A_port1 = 38.3523 mph
V_testSection1 := Q/A_testSection1 = 68.1818 mph
V_port2 := Q/A_port2 = 68.592 mph
V_testSection2 := Q/A_testSection2 = 48.8316 mph
# Location
z_top := 47 in
z_bot := 0 in
z_port1 := 44 in
z_testSection1 := 36 in
z_port2 := 28 in
z_testSection2 := 16 in
