V := 1
w := 1
υ_air := 1
Re_prototype := 1  # so its pretty
V_model := 1
V_prototype := 1
w_prototype := 1
w_model := 1
Re_w := V*w/υ_air  # We can make the Reynolds Number match by changeing the length of the scale model
Re_model := Re_prototype
V_model := V_prototype*w_prototype/w_model  # Since the model is 1/10th the size we will need 10x the velocity to make the Reynolds numbers match.
